# Задаем координаты вершин пирамиды и положения камеры:
PIR := [0, 0, 3, 0, 0, 1; 3, 0, 0, 1, 0, 0; 0, 0, 0, 3, 3, 3; 1, 1, 1, 1, 1, 1]
PV := [10; 315; 45]
# Получаем сферические координаты точки наблюдения:
r_v := PV[0] = 10
ϕ_v := PV[1]*π/180 = 5.49779
θ_v := PV[2]*π/180 = 0.785398
# Задаем положение секущей плоскости в МСК XYZ
ϕ_grad := 50
# -угол между осью z и вектором нормали к секущей плоскости
ϕ := ϕ_grad/180*π
ϕ = 0.872665
# для изменения угла наклона сечения
N := transpose([0, sin(ϕ), cos(ϕ)])  # - вектор нормали к секущей плоскости
z_0 := 3/4*PIR[:, 3][2]  # - для изменения высоты сечения
x_0 := 0
y_0 := 0
z_0 = 2.25  # - координаты точки пересечения оси Z и секущей плоскости
# Задаем параметры уравнения секущей плоскости
[A; B; C] := N
[A; B; C] = [0; 0.766044; 0.642788]
D := -(A*x_0 + B*y_0 + C*z_0)
D = -1.44627
# Находим точку пересечения P1 секущей плоскости с ребром AD (явно используется уравнение плоскости в пространстве)
V1 := submatrix(PIR, 0, 2, 0, 0) = [0; 3; 0]
V2 := submatrix(PIR, 0, 2, 3, 3) = [0; 1; 3]
ΔV := V2 - V1
t_AD := -((N*V1 + D)/(N*ΔV))  # уравнение плоскости
t_AD := 0.3
V_AD := V1 + ΔV*t_AD
x_AD := V_AD[0] = 0
y_AD := V_AD[1] = 2.4
z_AD := V_AD[2] = 0.9  # - координаты точки пересечения Р1
# Находим точку пересечения P2 секущей плоскости с ребром CF
V1 := submatrix(PIR, 0, 2, 2, 2) = [3; 0; 0]
V2 := submatrix(PIR, 0, 2, 5, 5) = [1; 0; 3]
ΔV := V2 - V1
t_CF := -((N*V1 + D)/(N*ΔV))
t_CF = 0.75
V_CF := V1 + ΔV*t_CF
x_CF := V_CF[0] = 1.5  # - координаты точки пересечения Р2
y_CF := V_CF[1] = 0
z_CF := V_CF[2] = 2.25
# Находим точку пересечения P3 секущей плоскости с ребром BE
V1 := submatrix(PIR, 0, 2, 1, 1) = [0; 0; 0]
V2 := submatrix(PIR, 0, 2, 4, 4) = [0; 0; 3]
ΔV := V2 - V1
t_BE := -((N*V1 + D)/(N*ΔV))
t_BE = 0.75
V_BE := V1 + ΔV*t_BE
x_BE := V_BE[0] = 0  # - координаты точки пересечения Р3
y_BE := V_BE[1] = 0
z_BE := V_BE[2] = 2.25
# Получаем матрицу мировых коорднат точек P1, P2, P3
TR := [x_AD, x_CF, x_BE; y_AD, y_CF, y_BE; z_AD, z_CF, z_BE; 1, 1, 1]
# в нижней строке единицы, т.к. координаты однородные
# Задаем область отображения графика в окне Windows
x_LW := 200
y_LW := 100  # – левый верхний угол области отображения
x_HW := 700
y_HW := 500  # – правый нижний угол области отображения
# Формируем матрицу пересчета мировых координат в видовые
K_view := [
    -sin(ϕ_v), cos(ϕ_v), 0, 0;
    -cos(θ_v)*cos(ϕ_v), -cos(θ_v)*sin(ϕ_v), sin(θ_v), 0;
    -sin(θ_v)*cos(ϕ_v), -sin(θ_v)*sin(ϕ_v), -cos(θ_v), r_v;
    0, 0, 0, 1
]
# Вычисляем координаты вершин пирамиды в видовой системе координат (ВСК)
PIR_V := K_view*PIR  # -- во что = как * что
# Вычисляем координаты вершин треугольника сечения Р1,
# Р2, Р3 в видовой системе координат (ВСК)
TR_V := K_view*TR
# Определяем координаты проекции вершин пирамиды на картинную плоскость
P_XY := stack(transpose(transpose(PIR_V)[:, 0]), transpose(transpose(PIR_V)[:, 1]), transpose(transpose(PIR_V)[:, 3]))
# Определяем координаты проекции вершин треугольника сечения Р1,
# Р2, Р3 на картинную плоскость
TR_XY := stack(transpose(transpose(TR_V)[:, 0]), transpose(transpose(TR_V)[:, 1]), transpose(transpose(TR_V)[:, 3]))
# Определяем габаритную область проекции пирамиды на плоскость XY ВСК – картинную плоскость
x_L := min(transpose(P_XY)[:, 0])
y_H := max(transpose(P_XY)[:, 1])
# – левый верхний угол
x_L = 0
y_H = 2.62132
x_H := max(transpose(P_XY)[:, 0])
y_L := min(transpose(P_XY)[:, 1])
# – правый нижний угол
x_H = 2.12132
y_L = -1.5
# Вычисляем параметры, необходимые для формирования матрицы пересчета координат из плоскости XY ВСК в ОК
Δx_W := x_HW - x_LW
Δx_W = 500
Δx := x_H - x_L
Δx = 2.12132
Δy_W := y_HW - y_LW
Δy_W = 400
Δy := y_H - y_L
Δy = 4.12132
k_x := Δx_W/Δx
k_x = 235.702
k_y := Δy_W/Δy
k_y = 97.0563
T_SW := [k_x, 0, x_LW - k_x*x_L; 0, -k_y, y_HW + k_y*y_L; 0, 0, 1] = [235.702, 0, 200; 0, -97.0563, 354.416; 0, 0, 1]  # – матрица пересчета из ВСК в ОК
# Вычисляем оконные координаты вершин пирамиды
M_W := T_SW*P_XY
[x_a, x_b, x_c, x_d, x_e, x_f; y_a, y_b, y_c, y_d, y_e, y_f; q, q, q, q, q, q] := vectorize(round(M_W)) = [700, 200, 700, 367, 200, 367; 209, 354, 500, 100, 149, 197; 1, 1, 1, 1, 1, 1]
# Формируем массивы координат X и Y для рисования пирамиды
X := transpose([x_a, x_b, x_c, x_a, x_d, x_e, x_b, x_e, x_f, x_c, x_f, x_d])  # порядок точек любой (главное пройти все ребра) и Xi соотв Yi
Y := -transpose([y_a, y_b, y_c, y_a, y_d, y_e, y_b, y_e, y_f, y_c, y_f, y_d])  # тут минус, т.к. в ОСК у направлен вниз, а в МСК и ВСК - вверх
# Вычисляем оконные координаты вершин
# треугольника сечения Р1, Р2, Р3
TR_W := T_SW*TR_XY
[x_p1, x_p2, x_p3; y_p1, y_p2, y_p3; q, q, q] := vectorize(round(TR_W)) = [600, 450, 200; 176, 273, 200; 1, 1, 1]
# Формируем массивы координат Х и У для рисования
# сечения пирамиды
XC := transpose([x_p1, x_p2, x_p3, x_p1])
YC := -transpose([y_p1, y_p2, y_p3, y_p1])
# Вычисляем декартовы координаты камеры (вектора,
# определяющего положение камеры)
R_C := [r_v*sin(θ_v)*cos(ϕ_v); r_v*sin(θ_v)*sin(ϕ_v); r_v*cos(θ_v)]
R := [r_v*sin(θ_v)*cos(ϕ_v); r_v*sin(θ_v)*sin(ϕ_v); r_v*cos(θ_v)] = [5; -5; 7.07107]
X1 := transpose([x_e, x_b, x_c, x_f, x_e, x_d, x_f, x_c, x_a, x_d])
Y1 := -transpose([y_e, y_b, y_c, y_f, y_e, y_d, y_f, y_c, y_a, y_d])
A[0] := 0
B[0] := 0
C[0] := 3
D[0] := 0
E[0] := 0
F[0] := 1
A[1] := 3
B[1] := 0
C[1] := 0
D[1] := 1
E[1] := 0
F[1] := 0
A[2] := 0
B[2] := 0
C[2] := 0
D[2] := 3
E[2] := 3
F[2] := 3
BC := [C[0]; C[1]; C[2]] - [B[0]; B[1]; B[2]]
BE := [E[0]; E[1]; E[2]] - [B[0]; B[1]; B[2]]
BF := [F[0]; F[1]; F[2]] - [B[0]; B[1]; B[2]]
AB := [B[0]; B[1]; B[2]] - [A[0]; A[1]; A[2]]
AC := [C[0]; C[1]; C[2]] - [A[0]; A[1]; A[2]]
AD := [D[0]; D[1]; D[2]] - [A[0]; A[1]; A[2]]
AE := [E[0]; E[1]; E[2]] - [A[0]; A[1]; A[2]]
AF := [F[0]; F[1]; F[2]] - [A[0]; A[1]; A[2]]
BD := [D[0]; D[1]; D[2]] - [B[0]; B[1]; B[2]]
EF := [F[0]; F[1]; F[2]] - [E[0]; E[1]; E[2]]
DE := [E[0]; E[1]; E[2]] - [D[0]; D[1]; D[2]]
DF := [F[0]; F[1]; F[2]] - [D[0]; D[1]; D[2]]
CF := [F[0]; F[1]; F[2]] - [C[0]; C[1]; C[2]]
CE := [E[0]; E[1]; E[2]] - [C[0]; C[1]; C[2]]
CD := [D[0]; D[1]; D[2]] - [C[0]; C[1]; C[2]]
ED := [E[0]; E[1]; E[2]] - [D[0]; D[1]; D[2]]
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Nabed := AB×ED
Ncfad := CF×AD
Nabc := AB×AC
EB := [E[0]; E[1]; E[2]] - [B[0]; B[1]; B[2]]
q4 := Nabed*R_C = 0
q2 := Ncfad*R_C = 28.2843
q1 := Nabc*R_C = 63.6396
# Видима | Видима | Видима
Ndfe := DF×DE
Ncfeb := CF×EB
q3 := Ndfe*R_C = -7.07107
q5 := Ncfeb*R_C = -30
# Не видима | Не видима
